*Node, NSET=Nall
1, -34.925, 63.5, 9.525
2, -41.275, 57.15, 9.525
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*Element, TYPE=C3D10, ELSET=Eall
744, 1036, 1043, 240, 1034, 1072, 1164, 1165, 1088, 1089, 1166
745, 868, 903, 908, 1163, 1168, 934, 1167, 1170, 1169, 1171
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

***********************************************************
** Element sets for materials and FEM element type (solid, shell, beam, fluid)
** written by write_element_sets_material_and_femelement_type function
*ELSET,ELSET=SolidMaterialSolid
Eall

***********************************************************
** Node sets for fixed constraint
** written by write_node_sets_constraints_fixed function
** FemConstraintFixed
*NSET,NSET=FemConstraintFixed
512,
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
***********************************************************
** Materials
** written by write_materials function
** Young's modulus unit is MPa = N/mm2
** FreeCAD material name: CalculiX-Steel
** SolidMaterial
*MATERIAL, NAME=SolidMaterial
*ELASTIC
210000, 0.300

***********************************************************
** Sections
** written by write_femelementsets function
*SOLID SECTION, ELSET=SolidMaterialSolid, MATERIAL=SolidMaterial

***********************************************************
** At least one step is needed to run an CalculiX analysis of FreeCAD
** written by write_step_begin function
*STEP
*STATIC


***********************************************************
** Fixed Constraints
** written by write_constraints_fixed function
** FemConstraintFixed
*BOUNDARY
FemConstraintFixed,1
FemConstraintFixed,2
FemConstraintFixed,3


***********************************************************
** Node loads Constraints
** written by write_constraints_force function
*CLOAD
** FemConstraintForce
** node loads on shape: Part__Feature:Face16
37,3,-0.0000000000000E+00
199,3,-0.0000000000000E+00
200,3,-0.0000000000000E+00
201,3,-0.0000000000000E+00
202,3,-0.0000000000000E+00
204,3,-0.0000000000000E+00
205,3,-0.0000000000000E+00
206,3,-0.0000000000000E+00
207,3,-0.0000000000000E+00
208,3,-3.4816178378460E-02
209,3,-3.4816178378460E-02
211,3,-3.3714262125289E-02
214,3,-3.2920206324632E-02
216,3,-3.3714262125289E-02
217,3,-3.3223508651519E-02
903,3,-0.0000000000000E+00
904,3,-0.0000000000000E+00
905,3,-0.0000000000000E+00
906,3,-0.0000000000000E+00
907,3,-0.0000000000000E+00
908,3,-0.0000000000000E+00
909,3,-0.0000000000000E+00
910,3,-6.9632356756920E-02
911,3,-7.1216576449350E-02
912,3,-6.6937770776808E-02
913,3,-6.9623906722408E-02
914,3,-6.1826389440055E-02
915,3,-7.1216576449350E-02
916,3,-3.3714262125289E-02
917,3,-3.6400398070890E-02
918,3,-6.1826389440055E-02
919,3,-6.0468226253144E-02
921,3,-2.6753964127855E-02
922,3,-5.0383515275831E-02
923,3,-3.2920206324632E-02
925,3,-2.3629551147976E-02
926,3,-5.9183416978716E-02
927,3,-2.6753964127855E-02
928,3,-2.6263210654084E-02
929,3,-4.9892761802061E-02
930,3,-6.0468226253144E-02
931,3,-5.0383515275831E-02
932,3,-4.9055542517142E-02
933,3,-4.7259102295953E-02
934,3,-5.0851982738331E-02
935,3,-4.7259102295953E-02
936,3,-4.9055542517142E-02
937,3,-4.7259102295953E-02


***********************************************************
** Outputs --> frd file
** written by write_outputs_types function
*NODE FILE
U
*EL FILE
S, E
** outputs --> dat file
*NODE PRINT , NSET=Nall
U
*EL PRINT , ELSET=Eall
S

***********************************************************
** written by write_step_end function
*END STEP

***********************************************************
** CalculiX Input file
** written by write_footer function
**   written by    --> FreeCAD 0.17.10885 (Git)
**   written on    --> Wed Apr 26 10:28:19 2017
**   file name     --> onshape.fcstd
**   analysis name --> Analysis
**
**
**
**   Units
**
**   Geometry (mesh data)        --> mm
**   Materials (Young's modulus) --> N/mm2 = MPa
**   Loads (nodal loads)         --> N
**
